// COMSOL Multiphysics 6.0.0.318 model "Task-2.mph"
// Outline of the model tree

Parameters
  m = me_const[1/kg]/e_const[1/C]  // Electron mass(eV/c^2)
  hbar = hbar_const[1/(J*s)]/e_const[1/C]  // Reduced Planck constant(eV*s)
  V_In = 0  // Potential barries,InAs(eV)
  V_Ga = 0.697  // Potential barries,GaAs(eV)
  c_In = hbar^2/(2*0.023*m)  // c coefficient, InAs
  c_Ga = hbar^2/(2*0.067*m)  // c coefficient, GaAs
  I = 0  // Principal quantum number

Geometry
  geom1 "Design-2" (2D axisymmetric, length unit nm)
    r1: Rectangle | pos = {12.5, 0}; base = center; size = {25, 100}
    pol1: Polygon | source = table; table = {{0, 0}, {12, 0}, {0, 3.6}}
    r2: Rectangle | pos = {12.5, 0}; base = center; size = {25, 2}
    co1: Compose | input = pol1, r2; intbnd = off; edge = all; formula = r2+pol1
    co2: Compose | input = co1, r1; formula = r1+co1
    fin: Finalize "Form Union"

Physics
  c: CoefficientFormPDE on all domains
    dependent variable u
    cfeq1: CoefficientFormPDE (default) | c = {c_In, 0, 0, c_In}; a = c_In*(I/r)^2+V_In; f = 1; da = 1; be = {-c_In/r, 0}
    zflx1: ZeroFluxBoundary "Zero Flux 1" (default)
    init1: init "Initial Values 1" (default)
    cfeq2: CoefficientFormPDE on domains 1, 3
      c = {c_Ga, 0, 0, c_Ga}
      a = c_Ga*(I/r)^2+V_Ga
      f = 1
      da = 1
      be = {-c_Ga/r, 0}
    dir1: DirichletBoundary "Dirichlet Boundary Condition 1" on boundaries 2, 9 | r = 0

Mesh
  mesh1 "Mesh 1" (physics-controlled)

Studies
  std1 "Study 1"
    eigv: Eigenvalue | neigs = 4

Solver configurations
  sol1 "Solution 1" (study std1)
    v1: Variables "Dependent Variables 1"
    e1: Eigenvalue "Eigenvalue Solver 1"
      dDef: Direct

Datasets
  dset1: Solution | solution = sol1
  rev1: Revolve2D "Revolution 2D 1" | data = dset1; startangle = -90; revangle = 225

Plots
  pg1: PlotGroup2D "2D Plot Group 1" | data = dset1; title = Dependent Variable u (1)
    surf1: Surface | expr = u
      hght1: Height "Height Expression 1" | expr = u
  pg2: PlotGroup3D "3D Plot Group 2" | data = rev1; title = Dependent Variable u (1)
    surf1: Surface | expr = u