// COMSOL Multiphysics 6.0.0.318 model "Task-3.mph"
// Outline of the model tree

Parameters
  me = me_const[1/kg]/e_const[1/C]  // Electron mass(eV/c^2)
  hbar = hbar_const[1/(J*s)]/e_const[1/C]  // Reduced Planck constant(eV*s)
  V_In = 0  // Potential barries,InAs(eV)
  V_Ga = 0.697  // Potential barries,GaAs(eV)
  c_In = hbar^2/(2*0.023*me)  // c coefficient, InAs
  c_Ga = hbar^2/(2*0.067*me)  // c coefficient, GaAs
  I = 0  // Principal quantum number

Geometry
  geom1 "Geometry 1" (2D axisymmetric, length unit nm)
    r1: Rectangle | pos = {12.5, 0}; base = center; size = {25, 100}
    pol1: Polygon | source = table; table = {{0, 0}, {12, 0}, {0, 3.6}}
    r2: Rectangle | pos = {12.5, 0}; base = center; size = {25, 2}
    co1: Compose | input = pol1, r2; intbnd = off; edge = all; formula = r2+pol1
    co2: Compose | input = co1, r1; formula = r1+co1
    fin: Finalize "Form Union"

Physics
  schr: SchrodingerEquation "Schrödinger Equation" on all domains
    dependent variable psi
    meff1: EffectiveMass (default)
    ve1: ElectronPotentialEnergy (default) | Ve_src = SHO
    axi1: AxialSymmetry (default)
    zflx1: ZeroFlux (default)
    init1: init "Initial Values 1" (default)
    meff2: EffectiveMass on domains 1, 3 | meffe_psi = 0.023*me_const
    open1: OpenBoundary on boundaries 2, 9

Mesh
  mesh1 "Mesh 1" (physics-controlled)

Studies
  std1 "Study 1"
    eigv: Eigenvalue | neigs = 4; shift = 0.1; conrad = 1

Solver configurations
  sol1 "Solution 1" (study std1)
    v1: Variables "Dependent Variables 1"
    e1: Eigenvalue "Eigenvalue Solver 1" | rtol = 1.0E-10; neigs = 4; shift = 0.1; eigref = 0.1
      dDef: Direct

Datasets
  dset1: Solution | solution = sol1

Derived values
  gev1: EvalGlobal "Eigenvalue"
    data = dset1
    expr = {schr.Ei, schr.int(2*schr.Pr*pi*R)}
    unit = {eV, 1}
    descr = {Eigenenergy, Total probability}

Plots
  pg1: PlotGroup2D "Normalized Wave Function (schr)"
    data = dset1
    title = Normalized Wave Function (schr)
    dataisaxisym = on
    surf1: Surface "Real Part" | expr = schr.Psi_psi
      hght1: Height "Height Expression 1"
    surf2: Surface "Imaginary Part" | expr = imag(schr.Psi_psi)
      hght1: Height "Height Expression 1"
  pg2: PlotGroup2D "Probability Density (schr)" | data = dset1; title = Probability Density (schr); dataisaxisym = on
    surf1: Surface | expr = schr.Pr
      hght1: Height "Height Expression 1"
  pg3: PlotGroup2D "Potential Energy (schr)" | data = dset1; title = Potential Energy (schr); dataisaxisym = on
    surf1: Surface | expr = schr.V_psi; unit = eV
      hght1: Height "Height Expression 1"
  pg4: PlotGroup2D "Effective Mass (schr)" | data = dset1; title = Effective Mass (schr); dataisaxisym = on
    surf1: Surface | expr = schr.meff_psiRR/me_const
      hght1: Height "Height Expression 1"